# OpenSim document version 40000
InverseKinematicsTool:
  time_range: 0 36.055
  marker_file: ../../../../../OneDrive/caliscope/4_cam/recording_4/HOLISTIC_OPENSIM/xyz_HOLISTIC_OPENSIM.trc
  IKTaskSet:
    IKMarkerTask left_hip: apply=true weight=1
    IKMarkerTask right_hip: apply=true weight=1
    IKMarkerTask right_knee: apply=true weight=1
    IKMarkerTask left_knee: apply=true weight=1
    IKMarkerTask right_ankle: apply=true weight=1
    IKMarkerTask left_ankle: apply=true weight=1
    IKMarkerTask right_heel: apply=true weight=1
    IKMarkerTask left_heel: apply=true weight=1
    IKMarkerTask left_foot_index: apply=true weight=1
    IKMarkerTask right_foot_index: apply=true weight=1
    IKMarkerTask right_shoulder: apply=true weight=1
    IKMarkerTask left_shoulder: apply=true weight=1
    IKMarkerTask right_elbow: apply=true weight=1
    IKMarkerTask left_elbow: apply=true weight=1
    IKMarkerTask left_wrist: apply=true weight=1
    IKMarkerTask right_wrist: apply=true weight=1
    IKMarkerTask left_index_finger_MCP: apply=true weight=1
    IKMarkerTask right_index_finger_MCP: apply=true weight=1
    IKMarkerTask right_outer_eye: apply=true weight=1
    IKMarkerTask left_pinky_MCP: apply=true weight=1
