# OpenSim document version 40000
ScaleTool FullBodyModel_MuscleActuatedLowerLimb_TorqueActuatedUpperBody-scaled:
  mass: 75.337 [kg]
  height: -1
  age: -1
  ModelScaler:
    apply: true
    scaling_order: measurements
    marker_file: ../../../../../OneDrive/caliscope/4_cam/recording_2/HOLISTIC_OPENSIM/xyz_HOLISTIC_OPENSIM.trc
    time_range: 6 6.5
    preserve_mass_distribution: true
    MeasurementSet:
      Measurement r_femur: apply=true
        MarkerPair: markers=(right_hip right_knee)
        BodyScale femur_r: axes=(X Y Z)
        BodyScale hand_r: axes=(X Y Z)
      Measurement r_tibia: apply=true
        MarkerPair: markers=(right_knee right_ankle)
        BodyScale tibia_r: axes=(X Y Z)
      Measurement l_femur: apply=true
        MarkerPair: markers=(left_hip left_knee)
        BodyScale femur_l: axes=(X Y Z)
        BodyScale hand_l: axes=(X Y Z)
      Measurement l_tibia: apply=true
        MarkerPair: markers=(left_knee left_ankle)
        BodyScale tibia_l: axes=(X Y Z)
      Measurement torso: apply=true
        MarkerPair: markers=(right_shoulder right_hip)
        MarkerPair: markers=(left_shoulder left_hip)
        BodyScale torso: axes=(X Y Z)
      Measurement r_calcn: apply=true
        MarkerPair: markers=(right_ankle right_heel)
        BodyScale calcn_r: axes=(X Y Z)
      Measurement l_calcn: apply=true
        MarkerPair: markers=(left_ankle left_heel)
        BodyScale calcn_l: axes=(X Y Z)
      Measurement r_toes: apply=true
        MarkerPair: markers=(right_ankle right_foot_index)
        BodyScale toes_r: axes=(X Y Z)
      Measurement l_toes: apply=false
        MarkerPair: markers=(left_ankle left_foot_index)
      Measurement r_humerus: apply=true
        MarkerPair: markers=(right_shoulder right_elbow)
        BodyScale humerus_r: axes=(X Y Z)
      Measurement l_humerus: apply=true
        MarkerPair: markers=(left_shoulder left_elbow)
        BodyScale humerus_l: axes=(X Y Z)
      Measurement r_forearm: apply=true
        MarkerPair: markers=(right_elbow right_wrist)
        BodyScale ulna_r: axes=(X Y Z)
        BodyScale radius_r: axes=(X Y Z)
      Measurement l_forearm: apply=true
        MarkerPair: markers=(left_elbow left_wrist)
        BodyScale ulna_l: axes=(X Y Z)
        BodyScale radius_l: axes=(X Y Z)
      Measurement r_hand: apply=false
        MarkerPair: markers=(right_wrist right_pinky_MCP)
      Measurement l_hand: apply=false
        MarkerPair: markers=(left_wrist left_pinky_MCP)
      Measurement Unnamed: apply=false
  MarkerPlacer:
    apply: false
    marker_file: ../../../../../OneDrive/caliscope/4_cam/recording_2/HOLISTIC_OPENSIM/xyz_HOLISTIC_OPENSIM.trc
    time_range: 7 7.139
    max_marker_movement: -1
    IKTaskSet:
      IKMarkerTask left_hip: apply=true weight=1
      IKMarkerTask right_hip: apply=true weight=1
      IKMarkerTask right_knee: apply=true weight=1
      IKMarkerTask left_knee: apply=true weight=1
      IKMarkerTask right_ankle: apply=true weight=1
      IKMarkerTask left_ankle: apply=true weight=1
      IKMarkerTask right_heel: apply=true weight=1
      IKMarkerTask left_heel: apply=true weight=1
      IKMarkerTask left_foot_index: apply=true weight=1
      IKMarkerTask right_foot_index: apply=true weight=1
      IKMarkerTask right_shoulder: apply=true weight=1
      IKMarkerTask left_shoulder: apply=true weight=1
      IKMarkerTask right_elbow: apply=true weight=1
      IKMarkerTask left_elbow: apply=true weight=1
      IKMarkerTask left_wrist: apply=true weight=1
      IKMarkerTask right_wrist: apply=true weight=1
      IKMarkerTask left_index_finger_MCP: apply=true weight=1
      IKMarkerTask right_index_finger_MCP: apply=true weight=1
      IKMarkerTask left_pinky_MCP: apply=true weight=1
